Дано
N := 27
Q_1 := (1 + 0.1*N)*10^-4 = 0.00037
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Q_2 := (120 - N)*10^-5 = 0.00093
l1 := 0.2 + 0.01*N = 0.47  # м
l2 := 2 + 0.1*N = 4.7  # м
l3 := 2.5 + 0.1*N = 5.2  # м
l4 := 3 + 0.1*N = 5.7  # м
l5 := 3.5 + 0.1*N = 6.2  # м
l6 := 4 + 0.1*N = 6.7  # м
l7 := 5 + 0.1*N = 7.7  # м
K_м := 1 + 0.01*N = 1.27
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Рц := 1.3*10^7 - 10^5*N = 10300000
Ргм := 3*10^6 + 1.2*N*10^5 = 6240000
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δ(p, D, σ) := p*D/σ
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D(Q, Vmax) := 2*sqrt(Q/(π*Vmax))
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# Внутренние диаметры | Толщина
D_1 := 2*sqrt((Q_1 + Q_2)/(π*1.2)) = 0.0371395  # м
δ_1 := 2*5*10^4*D_1/(2*50*10^6) = 3.71395e-5  # м
D_2 := 2*sqrt((Q_1 + Q_2)/(π*6.5)) = 0.0159577  # м
δ_2 := 2*Рц*D_2/(2*25*10^6) = 0.00657457  # м
D_3 := 2*sqrt(Q_1/(π*6)) = 0.00886095  # м
δ_3 := 2*Рц*D_3/(2*50*10^6) = 0.00182536  # м
D_4.1 := 2*sqrt(K_м*Q_1/(π*6)) = 0.00998578  # м
D_4.2 := 2*sqrt(K_м*Q_1/(π*2)) = 0.0172959  # м
δ_4.1 := 2*Рц*D_4.1/(2*50*10^6) = 0.00205707  # м
D_5 := 2*sqrt(Q_2/(π*6.1)) = 0.0139326  # м
δ_4.2 := 2*(5*10^5)*D_4.2/(2*50*10^6) = 0.000172959  # м
D_6.1 := 2*sqrt(Q_2/(π*6.1)) = 0.0139326  # м
δ_5 := 2*Рц*D_5/(2*50*10^6) = 0.00287011  # м
δ_6.1 := 2*Рц*D_6.1/(2*50*10^6) = 0.00287011  # м
D_6.2 := 2*sqrt(Q_2/(π*2)) = 0.0243322  # м
D_7 := 2*sqrt((K_м*Q_1 + Q_2)/(π*2)) = 0.029853  # м
δ_6.2 := 2*(5*10^5)*D_6.2/(2*50*10^6) = 0.000243322  # м
δ_7 := 2*(5*10^5)*D_7/(2*50*10^6) = 0.00029853  # м
# Выбор труб | Фактические диаметры
# Труба_1  = (38*0.4*470*ГОСТ8734 - 75)/(В10ГОСТ8733 - 87)
d_1 := 37.2*10^-3  # м
# Труба_2  = (30*7*4700*ГОСТ8734 - 75)/(В10ГОСТ8733 - 87)
d_2 := 16*10^-3  # м
d_3 := 9*10^-3  # м
# Труба_3  = (13*2*5200*ГОСТ8734 - 75)/(В10ГОСТ8733 - 87)
d_4.1 := 10*10^-3  # м
d_4.2 := 17.4*10^-3  # м
# Труба_4.1= (15*2.5*5200*ГОСТ8734 - 75)/(В10ГОСТ8733 - 87)
d_5 := 14*10^-3  # м
d_6.1 := 14*10^-3  # м
# Труба_4.2= (18*0.3*500*ГОСТ8734 - 75)/(В10ГОСТ8733 - 87)
d_6.2 := 24.4*10^-3  # м
d_7 := 30*10^-3  # м
# Труба_5  = (20*3*6200*ГОСТ8734 - 75)/(В10ГОСТ8733 - 87)
# Длины участков
# Труба_6.1  = (20*3*6200*ГОСТ8734 - 75)/(В10ГОСТ8733 - 87)
l_1 := 0.47  # м
# Труба_6.2  = (28*1.8*500*ГОСТ8734 - 75)/(В10ГОСТ8733 - 87)
l_2 := 4.7  # м
l_3 := 5.2  # м
l_4.1 := 5.2  # м
# Труба_7  = (32*1*7700*ГОСТ8734 - 75)/(В10ГОСТ8733 - 87)
l_4.2 := 0.5  # м
l_5 := 6.2  # м
l_6.1 := 6.2  # м
l_6.2 := 0.5  # м
l_7 := 7.7  # м
# Фактические скорости
V_1 := 4*(Q_1 + Q_2)/(π*d_1^2) = 1.1961  # м/с
V_2 := 4*(Q_1 + Q_2)/(π*d_2^2) = 6.46567  # м/с
V_3 := 4*Q_1/(π*d_3^2) = 5.81603  # м/с
V_4.1 := 4*(K_м*Q_1)/(π*d_4.1^2) = 5.98295  # м/с
V_4.2 := 4*(K_м*Q_1)/(π*d_4.2^2) = 1.97614  # м/с
V_5 := 4*Q_2/(π*d_5^2) = 6.04139  # м/с
V_6.1 := 4*Q_2/(π*d_6.1^2) = 6.04139  # м/с
V_6.2 := 4*Q_2/(π*d_6.2^2) = 1.9889  # м/с
V_7 := 4*(K_м*Q_1 + Q_2)/(π*d_7^2) = 1.98045  # м/с
Таблица
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# Выбор жидкости.
# Жидкость: масло И-20А
# Характеристики по ГОСТ 20799 - 2022:
# Плотность не более: 890 кг/м^3
# Кинематическая вязкость: 61.00 мм^2/с
Υ := 890*9.81 = 8730.9  # Н/м^3
v := 61*10^-6  # м^2/с
# Значения числа Рейнольдса
Re_1 := V_1*d_1/v = 729.425
Re_5 := V_5*d_5/v = 1386.55
Re_2 := V_2*d_2/v = 1695.91
Re_6.1 := V_6.1*d_6.1/v = 1386.55
Re_3 := V_3*d_3/v = 858.103
Re_6.2 := V_6.2*d_6.2/v = 795.561
Re_7 := V_7*d_7/v = 973.993
Re_4.1 := V_4.1*d_4.1/v = 980.812
Re_4.2 := V_4.2*d_4.2/v = 563.685
# Вывод: режим движения жидкости ламинарный на всех участках. Следует рассчитывать коэффициент гидравлического трения по формуле:
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# коэффициенты гидравлического трения
λ_1 := 64/Re_1 = 0.0877403
λ_5 := 64/Re_5 = 0.0461578
λ_6.1 := 64/Re_6.1 = 0.0461578
λ_2 := 64/Re_2 = 0.0377378
λ_6.2 := 64/Re_6.2 = 0.0804464
λ_3 := 64/Re_3 = 0.0745831
λ_7 := 64/Re_7 = 0.0657089
λ_4.1 := 64/Re_4.1 = 0.0652521
λ_4.2 := 64/Re_4.2 = 0.113539
Потери давления в линейном сопротивлении
Δp_l5 := Υ*λ_5*l_5/d_5*V_5^2/(2*9.81) = 332003
Δp_l1 := Υ*λ_1*l_1/d_1*V_1^2/(2*9.81) = 705.748
ζ_вр := 0.8
ζ_р := 8
ζ_тр := 2
ζ_ф := 10
ζ_вр1 := 1
Δp_l6.1 := Υ*λ_6.1*l_6.1/d_6.1*V_6.1^2/(2*9.81) = 332003
Δp_l2 := Υ*λ_2*l_2/d_2*V_2^2/(2*9.81) = 206225
ζ_вс := 0.5
Δp_l6.2 := Υ*λ_6.2*l_6.2/d_6.2*V_6.2^2/(2*9.81) = 2901.84
Δp_l3 := Υ*λ_3*l_3/d_3*V_3^2/(2*9.81) = 648657
Δp_l7 := Υ*λ_7*l_7/d_7*V_7^2/(2*9.81) = 29436.3
Δp_l4.1 := Υ*λ_4.1*l_4.1/d_4.1*V_4.1^2/(2*9.81) = 540491
Δp_l6 := Δp_l6.1 + Δp_l6.2 = 334905
Δp_l4.2 := Υ*λ_4.2*l_4.2/d_4.2*V_4.2^2/(2*9.81) = 5669.68
Δp_l4 := Δp_l4.1 + Δp_l4.2 = 546161
Таблица
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Потери давления в местном сопротивлении
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ζ_вс := 0.7
ζ_вр := 1
ζ_рп := 1.5
ζ_сп := 2.5
ζ_р := 8
ζ_ф := 10
ζ_зк := 0.15
ζ_1 := ζ_зк + ζ_вс
ζ_2 := ζ_рп + ζ_вс
ζ_5 := ζ_р + ζ_вр
ζ_6 := ζ_вс + ζ_р
ζ_3 := ζ_р + ζ_вр
ζ_7 := ζ_сп + ζ_ф + ζ_вр + ζ_зк
ζ_4 := ζ_вс + ζ_р
Δp_m1 := Υ*ζ_1*V_1^2/(2*9.81) = 541.146
Δp_m5 := Υ*ζ_5*V_5^2/(2*9.81) = 146176
Δp_m2 := Υ*ζ_2*V_2^2/(2*9.81) = 40927
Δp_m6 := Υ*ζ_6*V_6.1^2/(2*9.81) = 141304
Δp_m3 := Υ*ζ_3*V_3^2/(2*9.81) = 135474
Δp_m7 := Υ*ζ_7*V_7^2/(2*9.81) = 23824.4
Δp_m4 := Υ*ζ_4*V_4.1^2/(2*9.81) = 138583
Таблица
# Общие потери давления
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Δp_ц := Δp_l2 + Δp_l3 + (Δp_l4 + Δp_l7)*K_м + (Δp_m2 + Δp_m3 + (Δp_m4 + Δp_m7)*K_м) = 1968549
Δp_гм := Δp_l2 + Δp_l5 + Δp_l6 + Δp_l7 + Δp_m5 + Δp_m6 + Δp_m7 = 1213874
p_нц := Δp_ц + Рц = 12268549
p_нгм := Δp_гм + Ргм = 7453874
# Размещение и потери дросселя
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Δp_др6.2 := p_нц - p_нгм = 4814675
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