# Дано:
N := 27
Q_1 := (1 + 0.1*N)*10^-4
ORIGIN := 1
(м/c)^3
Q_2 := (120 - N)*10^-5
l1 := 0.2 + 0.01*N  # м
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l2 := 2 + 0.1*N  # м
l3 := 2.5 + 0.1*N  # м
l4 := 3 + 0.1*N  # м
l5 := 3.5 + 0.1*N  # м
l6 := 4 + 0.1*N  # м
l7 := 5 + 0.1*N  # м
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K_м := 1 + 0.01*N
Рц := 1.3*10^7 - 10^5*N  # Па
Ргм := 3*10^6 + 1.2*N*10^5  # Па
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V_в := 1.2
p_в := 5*10^4  # Па
V_с := 2  # м/с
p_с := 5*10^5  # Па
V_н := 7
p_н := Рц
σ := 50*10^6  # Па
# Рассчётные расходы | Предельно допустимые скорости
# Давления
Q := [Q_1 + Q_2; Q_1 + Q_2; Q_1; K_м*Q_1; K_м*Q_1; Q_2; Q_2; Q_2; Q_1 + Q_2]
Vmax := [V_в; V_н; V_н; V_н; V_с; V_н; V_н; V_с; V_с]
p := [p_в; p_н; p_н; p_н; p_с; p_н; p_н; p_с; p_с]
Q =  # no stored result
# Рассчётные внутренние диаметры | Рассчётные толщины стенок
D := 2*sqrt(Q/(π*Vmax))
δ := vectorize(D*p)/σ
# Выбор труб | Фактические внутренние диаметры
# Труба_1  = (38*0.4*470*ГОСТ8734 - 75)/(В10ГОСТ8733 - 87)
# Труба_2  = (22*3.2*4700*ГОСТ8734 - 75)/(В10ГОСТ8733 - 87)
# Труба_3  = (12*1.8*5200*ГОСТ8734 - 75)/(В10ГОСТ8733 - 87)
d := [
    37.2*10^-3;
    15.6*10^-3;
    8.4*10^-3;
    9.4*10^-3;
    17.4*10^-3;
    13.4*10^-3;
    13.4*10^-3;
    24.4*10^-3;
    30*10^-3
]
# Труба_4.1= (15*2.8*5200*ГОСТ8734 - 75)/(В10ГОСТ8733 - 87)
# Труба_4.2= (18*0.3*500*ГОСТ8734 - 75)/(В10ГОСТ8733 - 87)
# Труба_5  = (19*2.8*6200*ГОСТ8734 - 75)/(В10ГОСТ8733 - 87) | Длины участков
# Труба_6.1  = (19*2.8*6200*ГОСТ8734 - 75)/(В10ГОСТ8733 - 87)
# Труба_6.2  = (28*1.8*500*ГОСТ8734 - 75)/(В10ГОСТ8733 - 87)
l := [0.47; 4.7; 5.2; 5.2; 0.5; 6.2; 6.2; 0.5; 7.7]
# Труба_7  = (32*1*7700*ГОСТ8734 - 75)/(В10ГОСТ8733 - 87)
# Фактические скорости
V := 4*Q/(π*d^2)
Таблица
# [component: inputs [Vmax, V, Q*1000*60, D*1000, d*1000, l*1000]]
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# Выбор жидкости
# Жидкость: масло И-20А
# Характеристики по ГОСТ 20799 - 2022:
# Плотность: 890 кг/м^3
# Кинематическая вязкость: 29 мм^2/с
ρ := 890  # кг/м^3
v := 29*10^-6  # м^2/с
# При 50С
μ := v*ρ
Υ := ρ*9.81
# Значения числа Рейнольдса
Re := vectorize(V*d)/v
# коэффициенты гидравлического трения
λ :=
    m ← 1
    while m ≤ 9
        λ[m] ← 64/Re[m] if Re[m] ≤ 2320
        λ[m] ← 0.3164/Re[m]^0.25 if Re[m] > 2320
        m ← m + 1
    λ
λ =  # no stored result
Потери давления в линейном сопротивлении
Δp_l := Υ*λ*(l/d)*V^2/(2*9.81)
Таблица
# [component: inputs [l, d*1000, Q*1000*60, V, Re, λ, Δp_l]]
Потери давления в местном сопротивлении
ζ_вс := 0.5
ζ_сп := 2
ζ_р := 8
ζ_вр2 := 0.8  # Сделать внезапные расширения
ζ_вр1 := 1
ζ_рп := 1
ζ_ф := 10
# Коэффициенты местных сопротивлений | Потери давления на местных сопротивлениях
ζ := [
    0;
    ζ_рп + ζ_вс;
    ζ_р + ζ_вр2;
    ζ_вс + ζ_р;
    ζ_вс + ζ_р;
    ζ_р + ζ_вр2;
    ζ_вс + ζ_р;
    ζ_вс + ζ_р;
    ζ_сп + ζ_ф + ζ_вр1
]
Δp_m := Υ*vectorize(ζ*V^2)/(2*9.81)
Таблица
# [component: inputs [ζ[2], ζ[3], ζ[4], ζ[5], ζ[6], ζ[7], ζ[8], ζ[9], Δp_m[2]/10^6, Δp_m[3]/10^6, Δp_m[4]/10^6, Δp_m[5]/10^6, Δp_m[6]/10^6, Δp_m[7]/10^6, Δp_m[8]/10^6, Δp_m[9]/10^6, sum(Δp_m)/10^6]]
# Общие потери давления
Δp_ц.m := Δp_m[2] + Δp_m[3] + (Δp_m[4] + Δp_l[5] + Δp_m[7])*K_м
Δp_ц.l := Δp_l[2] + Δp_l[3] + (Δp_l[4] + Δp_l[5] + Δp_l[7])*K_м
Δp_ц := Δp_ц.m + Δp_ц.l  # Па
Δp_гм.m := Δp_m[6] + Δp_m[7] + Δp_m[8] + Δp_m[9]
Δp_гм.l := Δp_l[2] + Δp_l[6] + Δp_l[7] + Δp_l[8] + Δp_l[9]
Δp_гм := Δp_гм.m + Δp_гм.l  # Па
p_нц := Δp_ц + Рц  # Па
p_нгм := Δp_гм + Ргм  # Па
# Размещение и потери дросселя
Δp_др6.2 := p_нц - p_нгм  # Па
d_др6.2 := sqrt(4*Q[8]/(μ*π*sqrt(2*Δp_др6.2/ρ)))  # м
ζ_др6.2 := 2*9.81*Δp_др6.2/(Υ*V[8]^2)
# 3. Построение характеристикик гидролиний
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# Выведем формулу нужного вида:
# Формула Дарси-Вейсбаха:
# d - внутренний диаметр
ΔP_Линейное := λ*(l/d)*(ρ*V^2/2)  # disabled  # (1)  # V - средняя скорость жидкости
# Объёмный расход:
Q := V*S  # disabled  # (2)  # S - площадь живого сечения
# Живое сечение для круглой трубы:
S := π*(d^2/4)  # disabled  # (3)
# Подставим (3) в (2) и выразим среднюю скорость жидкости:
V := (4*Q)/(π*d^2)  # disabled  # (4)
# Подставим (4) в (1):
ΔP_Линейное := λ*(l/d)*(ρ/2)*((4*Q)/(π*d^2))^2  # disabled  # (5)
# Уравнение (5) можно упростить:
ΔP_Линейное := (8*λ*l*ρ/(π^2*d^5))*Q^2  # disabled  # (10)
# Так как полные потери включают в себя линейные и местные:
ΔP_Участка := ΔP_Местное + ΔP_Линейное  # disabled  # (6)
# Перейдём к выводу формулы местных сопротивлений:
ΔP_Местное := Σξ*ρ*V^2/2  # disabled  # (7)
# У нас уже есть скорость, выраженная через расход (4). Подставим (4) в (7), чтобы связать местные потери с расходом:
(8)
ΔP_Местное := Σξ*ρ*(4*Q/(π*d^2))^2/2  # disabled
# Упростим, как и в случае с местными сопротивлениями:
ΔP_Местное := (8*Σξ*ρ/(π^2*d^4))*Q^2  # disabled  # (9)
# Подставим уравнения (9) и (10) в уравнение (6) и вынесем Q:
ΔP_Участка := ((8*Σξ*ρ/(π^2*d^4)) + (8*λ*l*ρ/(π^2*d^5)))*Q^2  # disabled  # (11)
Q_5кр := 2320*v*π*d*5/4
# Запишем зависимость в виде программы:
Δp(Q, n) :=
    ζ_уч ← ζ[n]
    ζ_уч ← ζ[n] + ζ_др6.2 if n == 8
    V_i ← 4*Q/(π*d[n]^2)
    Re_уч ← V_i*d[n]/v
    Q_кр ← 2320*v*π*d[n]/4
    λ_л ← 64/Re_уч
    λ_т ← 0.3164/Re_уч^0.25
    t ← (Re_уч - 2320)/(4000 - 2320)
    λ_уч ← λ_л if t < 0
    λ_уч ← λ_л*(1 - t) + λ_т*t if t > 0
    λ_уч ← λ_т if t ≥ 1
    Δp ← ((8*ζ_уч*ρ/(π^2*d[n]^4)) + (8*λ_уч*l[n]*ρ/(π^2*d[n]^5)))*Q^2
    Δp  # сделать расход в кубометрах на графиках
# нужно посчитать кью критическое и считать не до рабочей точки а до 5кью критических
# Q - объёмный расход в кубических метрах в секунду
# n - порядковый номер участка
Графики
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# Предположим, что вся система находится на одной высоте. Уравнение Бернулли для нашего случая:
H_n := H_m - (Δp_м + Δp_л)  # disabled
n := (m - 1)  # disabled
H := ρ*p + V^2/(2*g)  # disabled
